α := 0.079
β := 0.039
γ := 0.099
E_0 := 290
Given
W(0) == 600
S(0) == 520
d/dt(W(t)) == α*W(t) - β*S(t)
d/dt(S(t)) == γ*(W(t) - S(t) - E_0)
[W; S] := Odesolve([W; S], t, 10)
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W_1 := (β*E_0)/(β - α)
S_1 := (α*E_0)/(β - α)
W_1 = -282.75
S_1 = -572.75
λ_1 := ((α - γ) + sqrt((α - γ)^2 - 4*γ*(β - α)))/2
λ_2 := ((α - γ) - sqrt((α - γ)^2 - 4*γ*(β - α)))/2
λ_1 = 0.0537181
λ_2 = -0.0737181
# Оскільки λ1​>0, а λ2​<0, точка спокою типу Сідло. Система є нестійкою.
